// SBML level 3 version 1

model Pandey2018_reversible_transition_between_quiescence_and_proliferation()
  // Pandey2018-reversible transition between quiescence and proliferation
  // model units - substance: substance, time: time, volume: volume, area: area, length: length, extent: substance

  // Compartments:
  compartment compartment = 1 volume;

  // Parameters:
  S = 1;
  Ksm = 0.1;
  Kdm = 0.1;
  Kscycdm = 0.004;
  Kscycds = 0.004;
  Kdcycd = 0.008;
  Kscyceb = 0.0001;
  Kscycem = 0;
  Kscyce = 0.004;
  Kdcyce = 0.001;
  Kdcycea = 0.01;
  Khcyce = 0.25;
  Kscyca = 0.008;
  Kdcyca = 0.004;
  Kdcycac = 0.5;
  Khcyca = 0.1;
  Kse2fm = 0;
  Kse2f = 0.004;
  Kde2f = 0.003;
  Kde2fa = 0.01;
  Khe2f = 0.25;
  RbT = 1;
  Kase2f = 100;
  Kdise2f = 1;
  Kprb = 5;
  Kdprbp = 1;
  Kppeb = 0.5;
  Kdprbpp = 0.1;
  Kprbp = 2;
  JpRb = 0.01;
  JpRbp = 0.05;
  JdpRb = 0.05;
  JppRb = 0.5;
  Kscki = 0.04;
  Kdcki = 0.2;
  Kascki = 100;
  Kdiscki = 0.1;
  Ksub1 = 0.004;
  Kdub1 = 0.002;
  Kdub1c = 0.2;
  Ksemi1 = 0.45;
  Kdemi1 = 0.2;
  Kdemi1c = 2;
  Khemi1 = 0.1;
  Kascdh1 = 100;
  Kdiscdh1 = 0.1;
  Kacdh1 = 0.1;
  Kicdh1e = 0.14;
  Kicdh1a = 0.2;
  JdpCdh1 = 0.02;
  JpCdh1 = 0.25;
  Kse2fb = 0.0003;
  Kdckic = 1;
  Cdh1T = 1;
  Rbpp = 0.001;
  UbI = 0.02;
  Cdh1 = 0.998;
  EmiC = 0.002;
  Emi1T = 0.002;
  Cdh1dp = 1;
  CycACki = 0;
  CycDCki = 0;
  CycECki = 0.115;
  CkiT = 0.2;
  Rbp = 0;
  Comp2 = 0;
  Comp1 = 0.105;
  E2FT = 0.106;
  CycAT = 0;
  CycET = 0.119;
  CycDT = 0;
  Myc = 0;

  // Assignment rules:
  Rb := RbT - Rbp - Rbpp - Comp1 - Comp2;
  CycA := CycAT - CycACki;
  CycE := CycET - CycECki;
  CycD := CycDT - CycDCki;
  Cdh1p := Cdh1T - Cdh1 - EmiC;
  E2F := E2FT - Comp1 - Comp2;

  // Rate rules:
  Myc' = 1*(compartment*Ksm*S/compartment) + (-1*(compartment*Kdm*Myc/compartment));
  CycDT' = 1*(compartment*(Kscycdm*Myc + Kscycds*S)/compartment) + (-1*(compartment*Kdcycd*CycDT/compartment));
  CycET' = 1*(compartment*(Kscyceb + Kscycem*Myc + Kscyce*(E2F/(Khcyce + E2F)))/compartment) + (-1*(compartment*(Kdcyce + Kdcycea*CycA)*CycET/compartment));
  CycAT' = 1*(compartment*Kscyca*(E2F/(Khcyca + E2F))/compartment) + (-1*(compartment*(Kdcyca + Kdcycac*Cdh1)*CycAT/compartment));
  E2FT' = 1*(compartment*(Kse2fb + Kse2fm*Myc + Kse2f*(E2F/(Khe2f + E2F)))/compartment) + (-1*(compartment*(Kde2f + Kde2fa*CycA)*E2FT/compartment));
  Comp1' = 1*(compartment*(Kase2f*E2F*Rb + Kdprbp*(Comp2/(JdpRb + Comp2)))/compartment) + (-1*(compartment*(Kdise2f*Comp1 + Kprb*CycD*(Comp1/(JpRb + Comp1)) + Kppeb*(CycE + CycA)*(Comp1/(JppRb + Comp1)) + (Kde2f + Kde2fa*CycA)*Comp1)/compartment));
  Comp2' = 1*(compartment*(Kase2f*E2F*Rbp + Kprb*CycD*(Comp1/(JpRb + Comp1)))/compartment) + (-1*(compartment*(Kdise2f*Comp2 + Kdprbp*(Comp2/(JdpRb + Comp2)) + Kprbp*(CycE + CycA)*(Comp2/(JpRbp + Comp2)) + (Kde2f + Kde2fa*CycA)*Comp2)/compartment));
  Rbp' = 1*(compartment*(Kprb*CycD*(Rb/(JpRb + Rb)) + Kdise2f*Comp2 + (Kde2f + Kde2fa*CycA)*Comp2)/compartment) + (-1*(compartment*(Kase2f*E2F*Rbp + Kdprbp*(Rbp/(JpRb + Rbp)) + Kprbp*(CycE + CycA)*(Rbp/(JpRbp + Rbp)))/compartment));
  CkiT' = 1*(compartment*Kscki/compartment) + (-1*(compartment*(Kdcki + Kdckic*(CycE + CycA)*UbI)*CkiT/compartment));
  CycECki' = 1*(compartment*Kascki*CycE*(CkiT - CycECki - CycDCki - CycACki)/compartment) + (-1*(compartment*(Kdiscki + Kdcyce + Kdcycea*CycA + Kdcki + Kdckic*(CycE + CycA)*UbI)*CycECki/compartment));
  CycDCki' = 1*(compartment*Kascki*CycD*(CkiT - CycECki - CycDCki - CycACki)/compartment) + (-1*(compartment*(Kdiscki + Kdcycd + Kdcki + Kdckic*(CycE + CycA)*UbI)*CycDCki/compartment));
  CycACki' = 1*(compartment*Kascki*CycA*(CkiT - CycECki - CycDCki - CycACki)/compartment) + (-1*(compartment*(Kdiscki + Kdcyca + Kdcycac*Cdh1 + Kdcki + Kdckic*(CycE + CycA)*UbI)*CycACki/compartment));
  Cdh1dp' = 1*(compartment*Kacdh1*((Cdh1T - Cdh1dp)/(JdpCdh1 + (Cdh1T - Cdh1dp)))/compartment) + (-1*(compartment*(Kicdh1e*CycE + Kicdh1a*CycA)*(Cdh1dp/(JpCdh1 + Cdh1dp))/compartment));
  Emi1T' = 1*(compartment*Ksemi1*(E2F/(Khemi1 + E2F))/compartment) + (-1*(compartment*(Kdemi1 + Kdemi1c*Cdh1)*Emi1T/compartment));
  EmiC' = 1*(compartment*Kascdh1*(Cdh1T - EmiC)*(Emi1T - EmiC)/compartment) + (-1*(compartment*(Kdiscdh1 + Kdemi1 + Kdemi1c*Cdh1)*EmiC/compartment));
  Cdh1' = 1*(compartment*(Kacdh1*((Cdh1T - EmiC - Cdh1)/(JdpCdh1 + (Cdh1T - Cdh1dp))) + (Kdiscdh1 + Kdemi1 + Kdemi1c*Cdh1)*(Cdh1dp - Cdh1))/compartment) + (-1*(compartment*((Kicdh1e*CycE + Kicdh1a*CycA)*(Cdh1/(JpCdh1 + Cdh1dp)) + Kascdh1*Cdh1*(Emi1T - EmiC))/compartment));
  UbI' = 1*(compartment*Ksub1/compartment) + (-1*(compartment*(Kdub1 + Kdub1c*Cdh1)*UbI/compartment));
  Rbpp' = 1*(compartment*(Kprbp*(CycE + CycA)*(Rbp/(JpRbp + Rbp)) + Kprbp*(CycE + CycA)*(Comp2/(JpRbp + Comp2)) + Kppeb*(CycE + CycA)*(Rb/(JppRb + Rb)) + Kppeb*(CycE + CycA)*(Comp1/(JppRb + Comp1)))/compartment) + (-1*(compartment*Kdprbpp*(Rbpp/(JdpRb + Rbpp))/compartment));

  // Unit definitions:
  unit length = metre;
  unit area = metre^2;
  unit volume = 1e-3 litre;
  unit time = second;
  unit substance = 1e-3 mole;
end
