// SBML level 2 version 4

model MODEL1212030000()
  // Proctor2013 - Effect of Aβ immunisation in Alzheimer's disease (deterministic version)

  // Compartments:
  compartment cell = 1;

  // Parameters:
  ksynp53mRNA = 0.001;
  kdegp53mRNA = 0.0001;
  ksynMdm2mRNA = 0.0005;
  kdegMdm2mRNA = 0.0005;
  ksynMdm2mRNAGSK3bp53 = 0.0007;
  ksynp53 = 0.007;
  kdegp53 = 0.005;
  kbinMdm2p53 = 0.001155;
  krelMdm2p53 = 1.155e-5;
  kbinGSK3bp53 = 2e-6;
  krelGSK3bp53 = 0.002;
  ksynMdm2 = 0.000495;
  kdegMdm2 = 0.01;
  kbinE1Ub = 0.0002;
  kbinE2Ub = 0.001;
  kp53Ub = 5e-5;
  kp53PolyUb = 0.01;
  kbinProt = 2e-6;
  kactDUBp53 = 1e-7;
  kactDUBProtp53 = 0.0001;
  kactDUBMdm2 = 1e-7;
  kMdm2Ub = 4.56e-6;
  kMdm2PUb = 6.84e-6;
  kMdm2PolyUb = 0.00456;
  kdam = 0.08;
  krepair = 2e-5;
  kactATM = 0.0001;
  kinactATM = 0.0005;
  kphosp53 = 0.0002;
  kdephosp53 = 0.5;
  kphosMdm2 = 2;
  kdephosMdm2 = 0.5;
  kphosMdm2GSK3b = 0.005;
  kphosMdm2GSK3bp53 = 0.5;
  kphospTauGSK3bp53 = 0.1;
  kphospTauGSK3b = 0.0002;
  kdephospTau = 0.01;
  kbinMTTau = 0.1;
  krelMTTau = 0.0001;
  ksynTau = 8e-5;
  kbinTauProt = 1.925e-7;
  kdegTau20SProt = 0.01;
  kaggTau = 1e-8;
  kaggTauP1 = 1e-8;
  kaggTauP2 = 1e-7;
  ktangfor = 0.001;
  kinhibprot = 1e-7;
  ksynp53mRNAAbeta = 1e-5;
  kdamROS = 1e-5;
  kgenROSAbeta = 2e-5;
  kgenROSPlaque = 1e-5;
  kgenROSGlia = 1e-5;
  kproteff = 1;
  kremROS = 7e-5;
  kprodAbeta = 1.86e-5;
  kprodAbeta2 = 1.86e-5;
  kdegAbeta = 1.5e-5;
  kaggAbeta = 3e-6;
  kdisaggAbeta = 1e-6;
  kdisaggAbeta1 = 0.0002;
  kdisaggAbeta2 = 1e-6;
  kdegAbetaGlia = 0.005;
  kpf = 0.2;
  kpg = 0.15;
  kpghalf = 10;
  kactglia1 = 6e-7;
  kactglia2 = 6e-7;
  kinactglia1 = 5e-6;
  kinactglia2 = 5e-6;
  kbinAbetaGlia = 1e-5;
  krelAbetaGlia = 5e-5;
  kdegAntiAb = 2.75e-6;
  kbinAbantiAb = 1e-6;
  Sink = 1;
  Source = 1;
  disaggPlaque2 = 0;
  disaggPlaque1 = 0;
  degAbetaGlia = 0;
  AbetaDimer_antiAb = 0;
  Abeta_antiAb = 0;
  antiAb = 0;
  GliaA = 0;
  GliaM2 = 0;
  GliaM1 = 0;
  GliaI = 100;
  AbetaPlaque_GliaA = 0;
  AbetaDimer = 0;
  AMP = 1000;
  ADP = 1000;
  ATP = 10000;
  NFT = 0;
  PP1 = 50;
  Proteasome_Tau = 0;
  AggTau_Proteasome = 0;
  AggTau = 0;
  MT_Tau = 100;
  Tau_P2 = 0;
  Tau_P1 = 0;
  Tau = 0;
  AbetaPlaque = 0;
  AggAbeta_Proteasome = 0;
  Abeta = 0;
  GSK3b_p53_P = 0;
  GSK3b_p53 = 0;
  GSK3b = 500;
  Mdm2_P_Ub4_Proteasome = 0;
  Mdm2_Ub4_Proteasome = 0;
  p53_Ub4_Proteasome = 0;
  Mdm2_P_Ub4 = 0;
  Mdm2_P_Ub3 = 0;
  Mdm2_P_Ub2 = 0;
  Mdm2_P_Ub = 0;
  Mdm2_Ub4 = 0;
  Mdm2_Ub3 = 0;
  Mdm2_Ub2 = 0;
  Mdm2_Ub = 0;
  Mdm2_P1_p53_Ub4 = 0;
  Mdm2_p53_Ub4 = 0;
  Mdm2_p53_Ub3 = 0;
  Mdm2_p53_Ub2 = 0;
  Mdm2_p53_Ub = 0;
  DUB = 200;
  Mdm2DUB = 200;
  p53DUB = 200;
  Ub = 4000;
  Proteasome = 500;
  E2_Ub = 0;
  E1_Ub = 0;
  E2 = 100;
  E1 = 100;
  damDNA = 0;
  ROS = 0;
  IR = 0;
  Mdm2_P = 0;
  p53_P = 0;
  ATMI = 200;
  ATMA = 0;
  p53_mRNA = 10;
  Mdm2_mRNA = 10;
  Mdm2_p53 = 95;
  p53 = 5;
  Mdm2 = 5;

  // Rate rules:
  p53_mRNA' = 1*ksynp53mRNA*Source + (-1*kdegp53mRNA*p53_mRNA) + 1*ksynp53*p53_mRNA + (-1*ksynp53*p53_mRNA) + 1*ksynp53mRNAAbeta*Abeta;
  Mdm2_mRNA' = 1*ksynMdm2*Mdm2_mRNA + (-1*ksynMdm2*Mdm2_mRNA) + 1*ksynMdm2mRNA*p53 + 1*ksynMdm2mRNA*p53_P + 1*ksynMdm2mRNAGSK3bp53*GSK3b_p53 + 1*ksynMdm2mRNAGSK3bp53*GSK3b_p53_P + (-1*kdegMdm2mRNA*Mdm2_mRNA);
  Mdm2' = 1*ksynMdm2*Mdm2_mRNA + (-1*kbinMdm2p53*p53*Mdm2) + 1*krelMdm2p53*Mdm2_p53 + (-1*kMdm2Ub*Mdm2*E2_Ub) + 1*kactDUBMdm2*Mdm2_Ub*Mdm2DUB + 1*kbinProt*Mdm2_P1_p53_Ub4*Proteasome + (-1*kphosMdm2*Mdm2*ATMA) + 1*kdephosMdm2*Mdm2_P;
  p53' = 1*ksynMdm2mRNA*p53 + (-1*ksynMdm2mRNA*p53) + (-1*kbinMdm2p53*p53*Mdm2) + 1*krelMdm2p53*Mdm2_p53 + (-1*kbinGSK3bp53*GSK3b*p53) + 1*krelGSK3bp53*GSK3b_p53 + 1*ksynp53*p53_mRNA + (-1*kphosp53*p53*ATMA) + 1*kdephosp53*p53_P;
  p53_P' = 1*ksynMdm2mRNA*p53_P + (-1*ksynMdm2mRNA*p53_P) + (-1*kbinGSK3bp53*GSK3b*p53_P) + 1*krelGSK3bp53*GSK3b_p53_P + 1*kphosp53*p53*ATMA + (-1*kdephosp53*p53_P);
  GSK3b_p53' = 1*ksynMdm2mRNAGSK3bp53*GSK3b_p53 + (-1*ksynMdm2mRNAGSK3bp53*GSK3b_p53) + 1*kbinGSK3bp53*GSK3b*p53 + (-1*krelGSK3bp53*GSK3b_p53) + 1*kphosMdm2GSK3bp53*Mdm2_p53_Ub4*GSK3b_p53 + (-1*kphosMdm2GSK3bp53*Mdm2_p53_Ub4*GSK3b_p53) + 1*kphospTauGSK3bp53*GSK3b_p53*Tau + (-1*kphospTauGSK3bp53*GSK3b_p53*Tau) + 1*kphospTauGSK3bp53*GSK3b_p53*Tau_P1 + (-1*kphospTauGSK3bp53*GSK3b_p53*Tau_P1) + 1*kprodAbeta2*GSK3b_p53 + (-1*kprodAbeta2*GSK3b_p53);
  GSK3b_p53_P' = 1*ksynMdm2mRNAGSK3bp53*GSK3b_p53_P + (-1*ksynMdm2mRNAGSK3bp53*GSK3b_p53_P) + 1*kbinGSK3bp53*GSK3b*p53_P + (-1*krelGSK3bp53*GSK3b_p53_P) + 1*kphosMdm2GSK3bp53*Mdm2_p53_Ub4*GSK3b_p53_P + (-1*kphosMdm2GSK3bp53*Mdm2_p53_Ub4*GSK3b_p53_P) + 1*kphospTauGSK3bp53*GSK3b_p53_P*Tau + (-1*kphospTauGSK3bp53*GSK3b_p53_P*Tau) + 1*kphospTauGSK3bp53*GSK3b_p53_P*Tau_P1 + (-1*kphospTauGSK3bp53*GSK3b_p53_P*Tau_P1) + 1*kprodAbeta2*GSK3b_p53_P + (-1*kprodAbeta2*GSK3b_p53_P);
  Mdm2_p53' = 1*kbinMdm2p53*p53*Mdm2 + (-1*krelMdm2p53*Mdm2_p53) + (-1*kp53Ub*E2_Ub*Mdm2_p53) + 1*kactDUBp53*Mdm2_p53_Ub*p53DUB;
  GSK3b' = -1*kbinGSK3bp53*GSK3b*p53 + 1*krelGSK3bp53*GSK3b_p53 + (-1*kbinGSK3bp53*GSK3b*p53_P) + 1*krelGSK3bp53*GSK3b_p53_P + 1*kphosMdm2GSK3b*Mdm2_p53_Ub4*GSK3b + (-1*kphosMdm2GSK3b*Mdm2_p53_Ub4*GSK3b) + 1*kphospTauGSK3b*GSK3b*Tau + (-1*kphospTauGSK3b*GSK3b*Tau) + 1*kphospTauGSK3b*GSK3b*Tau_P1 + (-1*kphospTauGSK3b*GSK3b*Tau_P1);
  E1_Ub' = 1*(kbinE1Ub*E1*Ub*ATP/(5000 + ATP)) + (-1*kbinE2Ub*E2*E1_Ub);
  E1' = -1*(kbinE1Ub*E1*Ub*ATP/(5000 + ATP)) + 1*kbinE2Ub*E2*E1_Ub;
  Ub' = -1*(kbinE1Ub*E1*Ub*ATP/(5000 + ATP)) + 1*kactDUBMdm2*Mdm2_Ub4*Mdm2DUB + 1*kactDUBMdm2*Mdm2_Ub3*Mdm2DUB + 1*kactDUBMdm2*Mdm2_Ub2*Mdm2DUB + 1*kactDUBMdm2*Mdm2_Ub*Mdm2DUB + 4*kdegMdm2*Mdm2_Ub4_Proteasome*kproteff + 1*kactDUBp53*Mdm2_p53_Ub4*p53DUB + 1*kactDUBp53*Mdm2_p53_Ub3*p53DUB + 1*kactDUBp53*Mdm2_p53_Ub2*p53DUB + 1*kactDUBp53*Mdm2_p53_Ub*p53DUB + 4*(kdegp53*kproteff*p53_Ub4_Proteasome*ATP/(5000 + ATP)) + 1*kactDUBMdm2*Mdm2_P_Ub4*Mdm2DUB + 1*kactDUBMdm2*Mdm2_P_Ub3*Mdm2DUB + 1*kactDUBMdm2*Mdm2_P_Ub2*Mdm2DUB + 1*kactDUBMdm2*Mdm2_P_Ub*Mdm2DUB + 4*kdegMdm2*Mdm2_P_Ub4_Proteasome*kproteff;
  E2_Ub' = 1*kbinE2Ub*E2*E1_Ub + (-1*kMdm2Ub*Mdm2*E2_Ub) + (-1*kMdm2PolyUb*Mdm2_Ub*E2_Ub) + (-1*kMdm2PolyUb*Mdm2_Ub2*E2_Ub) + (-1*kMdm2PolyUb*Mdm2_Ub3*E2_Ub) + (-1*kp53Ub*E2_Ub*Mdm2_p53) + (-1*kp53PolyUb*Mdm2_p53_Ub*E2_Ub) + (-1*kp53PolyUb*Mdm2_p53_Ub2*E2_Ub) + (-1*kp53PolyUb*Mdm2_p53_Ub3*E2_Ub) + (-1*kMdm2PUb*Mdm2_P*E2_Ub) + (-1*kMdm2PolyUb*Mdm2_P_Ub*E2_Ub) + (-1*kMdm2PolyUb*Mdm2_P_Ub2*E2_Ub) + (-1*kMdm2PolyUb*Mdm2_P_Ub3*E2_Ub);
  E2' = -1*kbinE2Ub*E2*E1_Ub + 1*kMdm2Ub*Mdm2*E2_Ub + 1*kMdm2PolyUb*Mdm2_Ub*E2_Ub + 1*kMdm2PolyUb*Mdm2_Ub2*E2_Ub + 1*kMdm2PolyUb*Mdm2_Ub3*E2_Ub + 1*kp53Ub*E2_Ub*Mdm2_p53 + 1*kp53PolyUb*Mdm2_p53_Ub*E2_Ub + 1*kp53PolyUb*Mdm2_p53_Ub2*E2_Ub + 1*kp53PolyUb*Mdm2_p53_Ub3*E2_Ub + 1*kMdm2PUb*Mdm2_P*E2_Ub + 1*kMdm2PolyUb*Mdm2_P_Ub*E2_Ub + 1*kMdm2PolyUb*Mdm2_P_Ub2*E2_Ub + 1*kMdm2PolyUb*Mdm2_P_Ub3*E2_Ub;
  Mdm2_Ub' = 1*kMdm2Ub*Mdm2*E2_Ub + (-1*kMdm2PolyUb*Mdm2_Ub*E2_Ub) + 1*kactDUBMdm2*Mdm2_Ub2*Mdm2DUB + (-1*kactDUBMdm2*Mdm2_Ub*Mdm2DUB);
  Mdm2_Ub2' = 1*kMdm2PolyUb*Mdm2_Ub*E2_Ub + (-1*kMdm2PolyUb*Mdm2_Ub2*E2_Ub) + 1*kactDUBMdm2*Mdm2_Ub3*Mdm2DUB + (-1*kactDUBMdm2*Mdm2_Ub2*Mdm2DUB);
  Mdm2_Ub3' = 1*kMdm2PolyUb*Mdm2_Ub2*E2_Ub + (-1*kMdm2PolyUb*Mdm2_Ub3*E2_Ub) + 1*kactDUBMdm2*Mdm2_Ub4*Mdm2DUB + (-1*kactDUBMdm2*Mdm2_Ub3*Mdm2DUB);
  Mdm2_Ub4' = 1*kMdm2PolyUb*Mdm2_Ub3*E2_Ub + (-1*kactDUBMdm2*Mdm2_Ub4*Mdm2DUB) + (-1*kbinProt*Mdm2_Ub4*Proteasome);
  Mdm2DUB' = 1*kactDUBMdm2*Mdm2_Ub4*Mdm2DUB + (-1*kactDUBMdm2*Mdm2_Ub4*Mdm2DUB) + 1*kactDUBMdm2*Mdm2_Ub3*Mdm2DUB + (-1*kactDUBMdm2*Mdm2_Ub3*Mdm2DUB) + 1*kactDUBMdm2*Mdm2_Ub2*Mdm2DUB + (-1*kactDUBMdm2*Mdm2_Ub2*Mdm2DUB) + 1*kactDUBMdm2*Mdm2_Ub*Mdm2DUB + (-1*kactDUBMdm2*Mdm2_Ub*Mdm2DUB) + 1*kactDUBMdm2*Mdm2_P_Ub4*Mdm2DUB + (-1*kactDUBMdm2*Mdm2_P_Ub4*Mdm2DUB) + 1*kactDUBMdm2*Mdm2_P_Ub3*Mdm2DUB + (-1*kactDUBMdm2*Mdm2_P_Ub3*Mdm2DUB) + 1*kactDUBMdm2*Mdm2_P_Ub2*Mdm2DUB + (-1*kactDUBMdm2*Mdm2_P_Ub2*Mdm2DUB) + 1*kactDUBMdm2*Mdm2_P_Ub*Mdm2DUB + (-1*kactDUBMdm2*Mdm2_P_Ub*Mdm2DUB);
  Mdm2_Ub4_Proteasome' = 1*kbinProt*Mdm2_Ub4*Proteasome + (-1*kdegMdm2*Mdm2_Ub4_Proteasome*kproteff);
  Proteasome' = -1*kbinProt*Mdm2_Ub4*Proteasome + 1*kdegMdm2*Mdm2_Ub4_Proteasome*kproteff + (-1*kbinProt*Mdm2_P1_p53_Ub4*Proteasome) + 1*(kdegp53*kproteff*p53_Ub4_Proteasome*ATP/(5000 + ATP)) + (-1*kinhibprot*AggTau*Proteasome) + (-1*kinhibprot*AbetaDimer*Proteasome) + (-1*kbinProt*Mdm2_P_Ub4*Proteasome) + 1*kdegMdm2*Mdm2_P_Ub4_Proteasome*kproteff + (-1*kbinTauProt*Tau*Proteasome) + 1*kdegTau20SProt*Proteasome_Tau;
  Mdm2_p53_Ub' = 1*kp53Ub*E2_Ub*Mdm2_p53 + (-1*kp53PolyUb*Mdm2_p53_Ub*E2_Ub) + 1*kactDUBp53*Mdm2_p53_Ub2*p53DUB + (-1*kactDUBp53*Mdm2_p53_Ub*p53DUB);
  Mdm2_p53_Ub2' = 1*kp53PolyUb*Mdm2_p53_Ub*E2_Ub + (-1*kp53PolyUb*Mdm2_p53_Ub2*E2_Ub) + 1*kactDUBp53*Mdm2_p53_Ub3*p53DUB + (-1*kactDUBp53*Mdm2_p53_Ub2*p53DUB);
  Mdm2_p53_Ub3' = 1*kp53PolyUb*Mdm2_p53_Ub2*E2_Ub + (-1*kp53PolyUb*Mdm2_p53_Ub3*E2_Ub) + 1*kactDUBp53*Mdm2_p53_Ub4*p53DUB + (-1*kactDUBp53*Mdm2_p53_Ub3*p53DUB);
  Mdm2_p53_Ub4' = 1*kp53PolyUb*Mdm2_p53_Ub3*E2_Ub + (-1*kactDUBp53*Mdm2_p53_Ub4*p53DUB) + (-1*kphosMdm2GSK3b*Mdm2_p53_Ub4*GSK3b) + (-1*kphosMdm2GSK3bp53*Mdm2_p53_Ub4*GSK3b_p53) + (-1*kphosMdm2GSK3bp53*Mdm2_p53_Ub4*GSK3b_p53_P);
  p53DUB' = 1*kactDUBp53*Mdm2_p53_Ub4*p53DUB + (-1*kactDUBp53*Mdm2_p53_Ub4*p53DUB) + 1*kactDUBp53*Mdm2_p53_Ub3*p53DUB + (-1*kactDUBp53*Mdm2_p53_Ub3*p53DUB) + 1*kactDUBp53*Mdm2_p53_Ub2*p53DUB + (-1*kactDUBp53*Mdm2_p53_Ub2*p53DUB) + 1*kactDUBp53*Mdm2_p53_Ub*p53DUB + (-1*kactDUBp53*Mdm2_p53_Ub*p53DUB);
  Mdm2_P1_p53_Ub4' = 1*kphosMdm2GSK3b*Mdm2_p53_Ub4*GSK3b + 1*kphosMdm2GSK3bp53*Mdm2_p53_Ub4*GSK3b_p53 + 1*kphosMdm2GSK3bp53*Mdm2_p53_Ub4*GSK3b_p53_P + (-1*kbinProt*Mdm2_P1_p53_Ub4*Proteasome);
  p53_Ub4_Proteasome' = 1*kbinProt*Mdm2_P1_p53_Ub4*Proteasome + (-1*(kdegp53*kproteff*p53_Ub4_Proteasome*ATP/(5000 + ATP)));
  MT_Tau' = 1*kbinMTTau*Tau + (-1*krelMTTau*MT_Tau);
  Tau' = -1*kbinMTTau*Tau + 1*krelMTTau*MT_Tau + (-1*kphospTauGSK3bp53*GSK3b_p53*Tau) + (-1*kphospTauGSK3bp53*GSK3b_p53_P*Tau) + (-1*kphospTauGSK3b*GSK3b*Tau) + 1*kdephospTau*Tau_P1*PP1 + (-2*kaggTau*Tau^2*0.5) + (-1*kaggTau*Tau*AggTau) + 1*ksynTau*Source + (-1*kbinTauProt*Tau*Proteasome);
  Tau_P1' = 1*kphospTauGSK3bp53*GSK3b_p53*Tau + (-1*kphospTauGSK3bp53*GSK3b_p53*Tau_P1) + 1*kphospTauGSK3bp53*GSK3b_p53_P*Tau + (-1*kphospTauGSK3bp53*GSK3b_p53_P*Tau_P1) + 1*kphospTauGSK3b*GSK3b*Tau + (-1*kphospTauGSK3b*GSK3b*Tau_P1) + 1*kdephospTau*Tau_P2*PP1 + (-1*kdephospTau*Tau_P1*PP1) + (-2*kaggTauP1*Tau_P1^2*0.5) + (-1*kaggTauP1*Tau_P1*AggTau);
  Tau_P2' = 1*kphospTauGSK3bp53*GSK3b_p53*Tau_P1 + 1*kphospTauGSK3bp53*GSK3b_p53_P*Tau_P1 + 1*kphospTauGSK3b*GSK3b*Tau_P1 + (-1*kdephospTau*Tau_P2*PP1) + (-2*kaggTauP2*Tau_P2^2*0.5) + (-1*kaggTauP2*Tau_P2*AggTau);
  PP1' = 1*kdephospTau*Tau_P2*PP1 + (-1*kdephospTau*Tau_P2*PP1) + 1*kdephospTau*Tau_P1*PP1 + (-1*kdephospTau*Tau_P1*PP1);
  AggTau' = 2*kaggTauP1*Tau_P1^2*0.5 + 2*kaggTauP1*Tau_P1*AggTau + (-1*kaggTauP1*Tau_P1*AggTau) + 2*kaggTauP2*Tau_P2^2*0.5 + 2*kaggTauP2*Tau_P2*AggTau + (-1*kaggTauP2*Tau_P2*AggTau) + 2*kaggTau*Tau^2*0.5 + 2*kaggTau*Tau*AggTau + (-1*kaggTau*Tau*AggTau) + (-2*ktangfor*AggTau^2*0.5) + (-1*ktangfor*AggTau*NFT) + (-1*kinhibprot*AggTau*Proteasome);
  NFT' = 2*ktangfor*AggTau^2*0.5 + 2*ktangfor*AggTau*NFT + (-1*ktangfor*AggTau*NFT);
  AggTau_Proteasome' = 1*kinhibprot*AggTau*Proteasome;
  Abeta' = 1*kprodAbeta*Source + 1*kprodAbeta2*GSK3b_p53 + 1*kprodAbeta2*GSK3b_p53_P + (-1*kdegAbeta*Abeta) + 1*ksynp53mRNAAbeta*Abeta + (-1*ksynp53mRNAAbeta*Abeta) + 1*kgenROSAbeta*Abeta + (-1*kgenROSAbeta*Abeta) + (-2*kaggAbeta*Abeta^2*0.5) + 2*kdisaggAbeta*AbetaDimer + (-1*kbinAbantiAb*Abeta*antiAb);
  AggAbeta_Proteasome' = 1*kinhibprot*AbetaDimer*Proteasome + 1*kgenROSAbeta*AggAbeta_Proteasome + (-1*kgenROSAbeta*AggAbeta_Proteasome);
  AbetaDimer' = -1*kinhibprot*AbetaDimer*Proteasome + 1*kaggAbeta*Abeta^2*0.5 + (-2*kpf*AbetaDimer^2*0.5) + (-1*(kpg*AbetaDimer*AbetaPlaque^2/(kpghalf^2 + AbetaPlaque^2))) + (-1*kdisaggAbeta*AbetaDimer) + 1*kdisaggAbeta1*AbetaPlaque + 1*kdisaggAbeta2*antiAb*AbetaPlaque + (-1*kbinAbantiAb*AbetaDimer*antiAb);
  IR' = 1*kdam*IR + (-1*kdam*IR);
  damDNA' = 1*kdam*IR + (-1*krepair*damDNA) + 1*kactATM*damDNA*ATMI + (-1*kactATM*damDNA*ATMI) + 1*kdamROS*ROS;
  ATMA' = 1*kactATM*damDNA*ATMI + 1*kphosp53*p53*ATMA + (-1*kphosp53*p53*ATMA) + 1*kphosMdm2*Mdm2*ATMA + (-1*kphosMdm2*Mdm2*ATMA) + (-1*kinactATM*ATMA);
  ATMI' = -1*kactATM*damDNA*ATMI + 1*kinactATM*ATMA;
  Mdm2_P' = 1*kphosMdm2*Mdm2*ATMA + (-1*kdephosMdm2*Mdm2_P) + (-1*kMdm2PUb*Mdm2_P*E2_Ub) + 1*kactDUBMdm2*Mdm2_P_Ub*Mdm2DUB;
  Mdm2_P_Ub' = 1*kMdm2PUb*Mdm2_P*E2_Ub + (-1*kMdm2PolyUb*Mdm2_P_Ub*E2_Ub) + 1*kactDUBMdm2*Mdm2_P_Ub2*Mdm2DUB + (-1*kactDUBMdm2*Mdm2_P_Ub*Mdm2DUB);
  Mdm2_P_Ub2' = 1*kMdm2PolyUb*Mdm2_P_Ub*E2_Ub + (-1*kMdm2PolyUb*Mdm2_P_Ub2*E2_Ub) + 1*kactDUBMdm2*Mdm2_P_Ub3*Mdm2DUB + (-1*kactDUBMdm2*Mdm2_P_Ub2*Mdm2DUB);
  Mdm2_P_Ub3' = 1*kMdm2PolyUb*Mdm2_P_Ub2*E2_Ub + (-1*kMdm2PolyUb*Mdm2_P_Ub3*E2_Ub) + 1*kactDUBMdm2*Mdm2_P_Ub4*Mdm2DUB + (-1*kactDUBMdm2*Mdm2_P_Ub3*Mdm2DUB);
  Mdm2_P_Ub4' = 1*kMdm2PolyUb*Mdm2_P_Ub3*E2_Ub + (-1*kactDUBMdm2*Mdm2_P_Ub4*Mdm2DUB) + (-1*kbinProt*Mdm2_P_Ub4*Proteasome);
  Mdm2_P_Ub4_Proteasome' = 1*kbinProt*Mdm2_P_Ub4*Proteasome + (-1*kdegMdm2*Mdm2_P_Ub4_Proteasome*kproteff);
  ROS' = 1*kgenROSAbeta*Abeta + 1*kgenROSPlaque*AbetaPlaque + 1*kgenROSAbeta*AggAbeta_Proteasome + 1*kdamROS*ROS + (-1*kdamROS*ROS) + 1*kgenROSGlia*AbetaPlaque_GliaA + (-1*kremROS*ROS);
  AbetaPlaque' = 1*kgenROSPlaque*AbetaPlaque + (-1*kgenROSPlaque*AbetaPlaque) + 1*kpf*AbetaDimer^2*0.5 + 2*(kpg*AbetaDimer*AbetaPlaque^2/(kpghalf^2 + AbetaPlaque^2)) + (-1*(kpg*AbetaDimer*AbetaPlaque^2/(kpghalf^2 + AbetaPlaque^2))) + (-1*kdisaggAbeta1*AbetaPlaque) + (-1*kdisaggAbeta2*antiAb*AbetaPlaque) + 1*kactglia1*GliaI*AbetaPlaque + (-1*kactglia1*GliaI*AbetaPlaque) + 1*kactglia1*GliaM1*AbetaPlaque + (-1*kactglia1*GliaM1*AbetaPlaque) + (-1*kbinAbetaGlia*AbetaPlaque*GliaA) + 1*krelAbetaGlia*AbetaPlaque_GliaA;
  Proteasome_Tau' = 1*kbinTauProt*Tau*Proteasome + (-1*kdegTau20SProt*Proteasome_Tau);
  disaggPlaque1' = 1*kdisaggAbeta1*AbetaPlaque;
  antiAb' = 1*kdisaggAbeta2*antiAb*AbetaPlaque + (-1*kdisaggAbeta2*antiAb*AbetaPlaque) + (-1*kbinAbantiAb*Abeta*antiAb) + (-1*kbinAbantiAb*AbetaDimer*antiAb) + 1*10*kdegAbeta*Abeta_antiAb + 1*10*kdegAbeta*AbetaDimer_antiAb + 1*kactglia2*GliaM2*antiAb + (-1*kactglia2*GliaM2*antiAb) + (-1*kdegAntiAb*antiAb);
  disaggPlaque2' = 1*kdisaggAbeta2*antiAb*AbetaPlaque;
  Abeta_antiAb' = 1*kbinAbantiAb*Abeta*antiAb + (-1*10*kdegAbeta*Abeta_antiAb);
  AbetaDimer_antiAb' = 1*kbinAbantiAb*AbetaDimer*antiAb + (-1*10*kdegAbeta*AbetaDimer_antiAb);
  GliaM1' = 1*kactglia1*GliaI*AbetaPlaque + (-1*kactglia1*GliaM1*AbetaPlaque) + 1*kinactglia2*GliaM2 + (-1*kinactglia2*GliaM1);
  GliaI' = -1*kactglia1*GliaI*AbetaPlaque + 1*kinactglia2*GliaM1;
  GliaM2' = 1*kactglia1*GliaM1*AbetaPlaque + (-1*kactglia2*GliaM2*antiAb) + 1*kinactglia1*GliaA + (-1*kinactglia2*GliaM2);
  GliaA' = 1*kactglia2*GliaM2*antiAb + (-1*kinactglia1*GliaA) + (-1*kbinAbetaGlia*AbetaPlaque*GliaA) + 1*krelAbetaGlia*AbetaPlaque_GliaA + 1*kdegAbetaGlia*AbetaPlaque_GliaA;
  AbetaPlaque_GliaA' = 1*kbinAbetaGlia*AbetaPlaque*GliaA + (-1*krelAbetaGlia*AbetaPlaque_GliaA) + (-1*kdegAbetaGlia*AbetaPlaque_GliaA) + 1*kgenROSGlia*AbetaPlaque_GliaA + (-1*kgenROSGlia*AbetaPlaque_GliaA);
  degAbetaGlia' = 1*kdegAbetaGlia*AbetaPlaque_GliaA;

  // Events:
  ImmunizeCell: at (time >= 345600): antiAb = 50;

  // Unit definitions:
  unit substance = item;
end
