// SBML level 3 version 1

model New_Model()
  // Greene2019 - Differentiate Spontaneous and Induced Evolution to Drug Resistance During Cancer Treatment
  // model units - substance: substance, time: time, volume: volume, area: area, length: length, extent: substance

  // Compartments:
  compartment compartment = 1 volume;

  // Parameters:
  S_0 = 0.01;
  R_0 = 0;
  V_d = 0.1;
  V_c = 0.9;
  epsilon = 1e-6;
  d = 1;
  p_r = 0.2;
  u_on = 1.5;
  delta_ton = 1;
  delta_toff = 3;
  u = 0;
  alpha = 0.01;
  var Tumor_Volume_V;
  Sensitive_tumor_S = S_0;
  Resistant_tumor_R = 0;

  // Assignment rules:
  Tumor_Volume_V := Resistant_tumor_R + Sensitive_tumor_S;

  // Rate rules:
  Resistant_tumor_R' = 1*(compartment*(epsilon + alpha*u)*Sensitive_tumor_S/compartment) + 1*(compartment*p_r*(1 - (Sensitive_tumor_S + Resistant_tumor_R))*Resistant_tumor_R/compartment);
  Sensitive_tumor_S' = -1*(compartment*(epsilon + alpha*u)*Sensitive_tumor_S/compartment) + 1*(compartment*(1 - (Sensitive_tumor_S + Resistant_tumor_R))*Sensitive_tumor_S/compartment) + (-1*(compartment*d*u*Sensitive_tumor_S/compartment));

  // Events:
  treatment: at ((Tumor_Volume_V > V_d) && (u == 0)), t0=false: u = u + u_on;

  // Unit definitions:
  unit length = metre;
  unit area = metre^2;
  unit volume = 1e-3 litre;
  unit time = second;
  unit substance = 1e-3 mole;
end
