// SBML level 3 version 1

model New_Model()
  // Greene2019 - Differentiate Spontaneous and Induced Evolution to Drug Resistance During Cancer Treatment
  // model units - substance: substance, time: time, volume: volume, area: area, length: length, extent: substance

  // Compartments:
  compartment compartment = 1 volume;

  // Species:
  species Resistant_tumor_R in compartment = 0;
  species Sensitive_tumor_S in compartment = S_0;
  species $Tumor_Volume_V in compartment;

  // Parameters:
  S_0 = 0.01;
  R_0 = 0;
  V_d = 0.1;
  V_c = 0.9;
  epsilon = 1e-6;
  d = 1;
  p_r = 0.2;
  u_on = 1.5;
  delta_ton = 1;
  delta_toff = 3;
  u = 0;
  alpha = 0.01;

  // Assignment rules:
  Tumor_Volume_V := Resistant_tumor_R + Sensitive_tumor_S;

  // Reactions:
  Transition_to_resistance: Sensitive_tumor_S => Resistant_tumor_R; compartment*(epsilon + alpha*u)*Sensitive_tumor_S;
  growth_of_sensitive_tumor: => Sensitive_tumor_S; compartment*(1 - (Sensitive_tumor_S + Resistant_tumor_R))*Sensitive_tumor_S;  // modifiers: Resistant_tumor_R
  growth_of_resistant_tumor: => Resistant_tumor_R; compartment*p_r*(1 - (Sensitive_tumor_S + Resistant_tumor_R))*Resistant_tumor_R;  // modifiers: Sensitive_tumor_S
  drug_induced_death: Sensitive_tumor_S => ; compartment*d*u*Sensitive_tumor_S; drug_induced_death is "drug-induced death";

  // Events:
  treatment: at ((Tumor_Volume_V > V_d) && (u == 0)), t0=false: u = u + u_on;

  // Unit definitions:
  unit length = metre;
  unit area = metre^2;
  unit volume = 1e-3 litre;
  unit time = second;
  unit substance = 1e-3 mole;
end
