// SBML level 2 version 1

model model_0000001()
  // Clancy2001_Kchannel

  // Compartments:
  compartment cell = 1;

  // Parameters:
  R = 8.314; R is "gas constant";
  F = 96.485; F is "Faraday constant";
  Temp = 310; Temp is "temperature";
  ko = 5.4; ko is "extracellular K";
  ki = 140; ki is "introcellular K";
  vhold = -40; vhold is "holding_potential";
  vtest = 0; vtest is "test_potential";
  var vk; vk is "reversal potential for k";
  var Gk; Gk is "membrane_conductance";
  ain = 2.172;
  bin = 1.077;
  v = -40; v is "membrane_potential";
  var ik; ik is "cardiac delayed rectifier current";
  i = 0; i is "InactivationState";
  o = 0.06; o is "OpenState";
  ClosedState_1 = 0;
  ClosedState_2 = 0;
  ClosedState_3 = 1;

  // Assignment rules:
  vk := R*Temp/F*ln(ko/ki);
  Gk := 1.35e-2*ko^0.59;
  a := 5.55e-2*exp(0.05547153*(v - 12));
  b := 2.357e-3*exp(-0.036588*v);
  aa := 6.55e-2*exp(0.05547153*(v - 36));
  bb := 2.9357e-3*exp(-0.02158*v);
  ai := 0.439*exp(-0.02352*(v + 25))*4.5/ko;
  bi := 0.656*exp(0.000942*v)*(4.5/ko)^0.3;
  u := ai*bb*aa/(aa*bi);
  ik := Gk*o*(v - vk);

  // Rate rules:
  ClosedState_2' = 1*((a*ClosedState_3 - b*ClosedState_2)*cell/cell) + (-1*((ain*ClosedState_2 - bin*ClosedState_1)*cell/cell));
  ClosedState_3' = -1*((a*ClosedState_3 - b*ClosedState_2)*cell/cell);
  ClosedState_1' = 1*((ain*ClosedState_2 - bin*ClosedState_1)*cell/cell) + (-1*((ClosedState_1*aa - bb*o)*cell/cell)) + (-1*((aa*ClosedState_1 - u*i)*cell/cell));
  o' = 1*((ClosedState_1*aa - bb*o)*cell/cell) + (-1*((o*bi - ai*i)*cell/cell));
  i' = 1*((o*bi - ai*i)*cell/cell) + 1*((aa*ClosedState_1 - u*i)*cell/cell);

  // Events:
  event_0000001: at ((time > 50) && (time <= 300)): v = vtest;
  event_0000002: at (time > 300): v = vhold;

  // Unit definitions:
  unit time = 1e-3 second; time is "ms";
  unit mV = 1e-3 volt;
  unit substance = 1e-3 mole; substance is "mM";
end
