// SBML level 2 version 4

model New_Model()

  // Compartments:
  compartment compartment = 1;

  // Species:
  species A__conc in compartment = 1; A__conc is "A (conc)";
  species B__amount in compartment = 1/compartment; B__amount is "B (amount)";
  species C__initialAssignment in compartment = A__conc*2; C__initialAssignment is "C (initialAssignment)";
  species $D__assignment in compartment; D__assignment is "D (assignment)";
  species $E__ode in compartment = 1; E__ode is "E (ode)";

  // Assignment rules:
  D__assignment := sin(time);

  // Rate rules:
  E__ode' = 1;

  // Unit definitions:
  unit length = metre;
  unit area = metre^2;
  unit volume = 1e-3 litre;
  unit time = second;
  unit substance = 1e-3 mole;
end
