// SBML level 2 version 4

function fd(x)
  x^3;
end

model main()

  // Compartments:
  compartment a = 1;

  // Species:
  species s in a = 0;

  // Parameters:
  p has dimensionless;
  p1 = arccosh(x1); p1 has dimensionless;
  p2 has dimensionless;
  p3 = 2 dimensionless;
  x1 = 2 dimensionless;
  x2 = floor((time - 28)/24)*24; x2 has dimensionless;

  // Assignment rules:
  p2 := x1*exponentiale;
  p := root(3, x1);

  // Rate rules:
  p3' = log(2, p1);

  // Algebraic rules:
  0 = x1^3;

  // Reactions:
  r: (ln(p1)) s -> ; log10(s);
    k = 9 litre;

  // Events:
  at (x*3) after (x < 3), fromTrigger=false: a = log(3, x);

  // Constraints:
  constraint false && true;
end
