// SBML level 2 version 4

function fd(x)
  x^3;
end

model l2v4_all()

  // Compartments:
  compartment a = 1;

  // Species:
  species s in a = 0;

  // Parameters:
  p = 2 second;
  p1 = x*p3; p1 has litre;
  p2 has litre;
  p3 = 2 litre;
  x = 2 dimensionless;
  th = 3 dimensionless;
  t = 3 second;

  // Assignment rules:
  p2 := x*p3;

  // Rate rules:
  p3' = p1/p;

  // Algebraic rules:
  0 = x^th;

  // Reactions:
  r: (s*p) s -> ; s*k/p;
    k = 9 litre;

  // Events:
  at (x*t) after (x < th), fromTrigger=false: a = x*p3;

  // Constraints:
  constraint x < th;

  // Unit definitions:
  unit ud1 = mole;
end
