// SBML level 2 version 1

model Branch()
  // Simple branch system.
  // The reaction looks like this:
  // reaction-1: X0 -> S1; k1*X0;
  // reaction-2: S1 -> X1; k2*S1;
  // reaction-3: S1 -> X2; k3*S1;

  // Compartments:
  compartment compartmentOne = 1;

  // Species:
  species xdxd in compartmentOne = 0; xdxd is "αxdxd";
  species $X0 in compartmentOne = 0;
  species $X1 in compartmentOne = 0;
  species $X2 in compartmentOne = 0;

  // Reactions:
  reaction_1: $X0 => xdxd; k1*X0;
    k1 = 0;
  reaction_2: xdxd => $X1; k2*xdxd;
    k2 = 0;
  reaction_3: xdxd => $X2; k3*xdxd;
    k3 = 0;
end
