// SBML level 3 version 2

model m()

  // Compartments:
  compartment addedCompartment = 1;

  // Species:
  substanceOnly species MPF in addedCompartment = 1;
  substanceOnly species Cdc25 in addedCompartment = 1;
  substanceOnly species Wee1 in addedCompartment = 1;
  substanceOnly species Clock in addedCompartment = 1;
  substanceOnly species newVar1 in addedCompartment = 0;

  // Parameters:
  c = 1;
  k1 = 1;
  k2 = 1;
  k3 = 1;
  k4 = 1;

  // Reactions:
  J1: Cdc25 + newVar1 => MPF + Cdc25; Cdc25*k1*newVar1;
  J2: MPF + Wee1 => Wee1 + newVar1; MPF*Wee1*k2;
  J3: => Wee1; k3/(Clock + k4);  // modifiers: Clock
end
