// SBML level 2 version 4

function Function_for_R1f_1(InR, Ins, cellsurface, extracellular, k1)
  k1*Ins*extracellular*InR*cellsurface;
end

function Function_for_R2_1(Ins_InR, cellsurface, k3)
  k3*Ins_InR*cellsurface/cellsurface;
end

model MODEL1212210000()
  // Smith2013 - Regulation of Insulin Signalling by Oxidative Stress

  // Compartments:
  compartment extracellular = 8.3e-12;
  compartment cellsurface in extracellular = 6.4e-14;
  compartment cytoplasm in cellsurface = 1.65e-11;

  // Species:
  species $Ins in extracellular = 0;
  species InR in cellsurface = 90000/cellsurface;
  species Ins_InR in cellsurface = 0;
  species Ins_InR_P in cellsurface = 0;

  // Parameters:
  k1 = 2e-5;
  k3 = 2500;

  // Reactions:
  R1f: $Ins + InR => Ins_InR; Function_for_R1f_1(InR, Ins, cellsurface, extracellular, k1);
  R2: Ins_InR => Ins_InR_P; cellsurface*Function_for_R2_1(Ins_InR, cellsurface, k3);
end
