// SBML level 3 version 1

model main()
  // model units - time: second, extent: mole

  // Compartments:
  compartment comp = 1 litre;

  // Species:
  species E in comp = 5/comp;  // substance in mole
  species S in comp = 1/comp;  // substance in mole
  species ES in comp = 0;  // substance in mole

  // Parameters:
  kon = 1000000 litre_per_mole_second;
  koff = 0.2 per_second;

  // Assignment rules:
  a := 1;

  // Rate rules:
  ES' = comp*(kon*E*S - koff*ES)/comp;
  E' = -a*(comp*(kon*E*S - koff*ES)/comp);
  S' = -a*(comp*(kon*E*S - koff*ES)/comp);

  // Unit definitions:
  unit per_second = 1 / second;
  unit litre_per_mole_second = litre / (mole * second);
end
