// SBML level 2 version 4

model New_Model()

  // Compartments:
  compartment compartment = 1;

  // Species:
  substanceOnly species b in compartment = 1;
  substanceOnly species a in compartment = 1.1;
  substanceOnly species c in compartment = 0.9;
  substanceOnly species d in compartment = 1;
  substanceOnly species newVar1 in compartment = 0.1;

  // Parameters:
  k = 1.1;
  e = 1.1;

  // Reactions:
  J1: b + a + newVar1 => 2 b + newVar1; b*newVar1;
  J2: b + c + newVar1 => 2 c + newVar1; c*newVar1;
  J3: a + c + newVar1 => 2 a + newVar1; a*newVar1;
  J4: => d; 0.2;
  J5: => newVar1; -0.2;
end
