// SBML level 3 version 1

model valid_53()
  // valid_53 translated by MOCCASIN

  // Compartments:
  compartment compartmentOne = 1;

  // Species:
  species SimData_0 in compartmentOne = 1;
  species SimData_1 in compartmentOne = 1;
  species SimData_2 in compartmentOne = 1;
  species SimData_3 in compartmentOne = 0;
  species SimData_4 in compartmentOne = 0;
  species SimData_5 in compartmentOne = 0;

  // Parameters:
  I = 1;
  k_1 = 4.2416;
  k_2 = 5.9816;
  k_3 = 0.1009;
  k_4 = 1.1549;
  k_5 = 1.3618;
  k_6 = 1.4219;
  k_7 = 0.0051;
  k_8 = 0.0972;
  k_9 = 0.0012;
  k_10 = 56.8583;
  k_11 = 0.0111;
  k_12 = 0.0014;

  // Reactions:
  R_1: SimData_0 => SimData_5; SimData_0*(k_2/(SimData_0 + k_8));
  R_2: SimData_5 => SimData_0; k_1*SimData_5*(I/(SimData_5 + k_7));
  R_3: SimData_1 => SimData_4; SimData_1*(k_4/(SimData_1 + k_10));
  R_4: SimData_0 + SimData_4 => SimData_0 + SimData_1; SimData_0*SimData_4*(k_3/(SimData_4 + k_9));
  R_5: SimData_1 + SimData_2 => SimData_1 + SimData_3; SimData_1*SimData_2*(k_6/(SimData_2 + k_12));
  R_6: SimData_0 + SimData_3 => SimData_0 + SimData_2; SimData_0*SimData_3*(k_5/(SimData_3 + k_11));
end
