// SBML level 3 version 1

model main()

  // Compartments:
  compartment compartmentOne = 1;

  // Species:
  species SimData__1 in compartmentOne = 1;
  species SimData__2 in compartmentOne = 1;
  species SimData__3 in compartmentOne = 1;

  // Parameters:
  I = 1;
  k__1 = 4.2416;
  k__2 = 5.9816;
  k__3 = 0.1009;
  k__4 = 1.1549;
  k__5 = 1.3618;
  k__6 = 1.4219;
  k__7 = 0.0051;
  k__8 = 0.0972;
  k__9 = 0.0012;
  k__10 = 56.8583;
  k__11 = 0.0111;
  k__12 = 0.0014;

  // Assignment rules:
  t := time;

  // Rate rules:
  SimData__1' = k__1*I*(1 - SimData__1)/(1 - SimData__1 + k__7) - k__2*SimData__1/(SimData__1 + k__8);
  SimData__2' = k__3*SimData__1*(1 - SimData__2)/(1 - SimData__2 + k__9) - k__4*SimData__2/(SimData__2 + k__10);
  SimData__3' = k__5*SimData__1*(1 - SimData__3)/(1 - SimData__3 + k__11) - k__6*SimData__2*SimData__3/(SimData__3 + k__12);
end
