// SBML level 3 version 1

model main()

  // Compartments:
  compartment compartmentOne = 1;

  // Species:
  species SimData_1 in compartmentOne = 1;
  species SimData_2 in compartmentOne = 1;
  species SimData_3 in compartmentOne = 1;
  species SimData_4 in compartmentOne = 0;
  species SimData_5 in compartmentOne = 0;
  species SimData_6 in compartmentOne = 0;

  // Parameters:
  I = 1;
  k__1 = 4.2416;
  k__2 = 5.9816;
  k__3 = 0.1009;
  k__4 = 1.1549;
  k__5 = 1.3618;
  k__6 = 1.4219;
  k__7 = 0.0051;
  k__8 = 0.0972;
  k__9 = 0.0012;
  k__10 = 56.8583;
  k__11 = 0.0111;
  k__12 = 0.0014;

  // Assignment rules:
  t := time;

  // Reactions:
  J1: SimData_1 => SimData_6; SimData_1*(k__2/(SimData_1 + k__8));
  J2: SimData_6 => SimData_1; k__1*SimData_6*(I/(SimData_6 + k__7));
  J3: SimData_2 => SimData_5; SimData_2*(k__4/(SimData_2 + k__10));
  J4: SimData_1 + SimData_5 => SimData_1 + SimData_2; SimData_1*SimData_5*(k__3/(SimData_5 + k__9));
  J5: SimData_2 + SimData_3 => SimData_2 + SimData_4; SimData_2*SimData_3*(k__6/(SimData_3 + k__12));
  J6: SimData_1 + SimData_4 => SimData_1 + SimData_3; SimData_1*SimData_4*(k__5/(SimData_4 + k__11));
end
