// SBML level 3 version 1

model QuorumTrigger()

  // Compartments:
  compartment default = 1;

  // Species:
  substanceOnly species Env in default = 0;
  substanceOnly species LuxR in default = 0;
  substanceOnly species Complex in default = 0;
  substanceOnly species LuxI in default = 0;
  substanceOnly species GFP in default = 0;
  substanceOnly species P1 in default = 2;
  substanceOnly species P5 in default = 2;

  // Parameters:
  kr_f = 0.5; kr_f is "Forward repression binding rate";
  kr_r = 1; kr_r is "Reverse repression binding rate";
  ka_f = 0.0033; ka_f is "Forward activation binding rate";
  ka_r = 1; ka_r is "Reverse activation binding rate";
  kc_f = 0.05; kc_f is "Forward complex formation rate";
  kc_r = 1; kc_r is "Reverse complex formation rate";
  ko_f = 0.033; ko_f is "Forward RNAP binding rate";
  ko_r = 1; ko_r is "Reverse RNAP binding rate";
  kao_f = 1; kao_f is "Forward activated RNAP binding rate";
  kao_r = 1; kao_r is "Reverse activated RNAP binding rate";
  kmdiff_f = 1; kmdiff_f is "Forward membrane diffusion rate";
  kmdiff_r = 0.01; kmdiff_r is "Reverse membrane diffusion rate";
  kd = 0.0075; kd is "Degradation rate";
  kecd = 0.005; kecd is "Extracellular degradation rate";
  nc = 2; nc is "Stoichiometry of binding";
  nr = 30; nr is "Initial RNAP count";
  ko = 0.05; ko is "Open complex production rate";
  kb = 0.0001; kb is "Basal production rate";
  ng = 2; ng is "Initial promoter count";
  np = 10; np is "Stoichiometry of production";
  ka = 0.25; ka is "Activated production rate";
  kecdiff = 1; kecdiff is "Extracellular diffusion rate";

  // Reactions:
  Production_P1: => 10 LuxR; P1*(kb*(ko_f/ko_r)*nr + ka*(kao_f/kao_r)*nr*(ka_f/ka_r*Env)^nc)/(1 + ko_f/ko_r*nr + kao_f/kao_r*nr*(ka_f/ka_r*Env)^nc);  // modifiers: P1, Env
  Complex_Complex: 2 LuxR + 2 LuxI -> Complex; kc_f*LuxR^nc*LuxI^nc - kc_r*Complex;
  Production_P5: => 10 GFP + 10 LuxI + 10 LuxR; P5*(kb*(ko_f/ko_r)*nr + ka*(kao_f/kao_r)*nr*(ka_f/ka_r*Complex)^nc)/(1 + ko_f/ko_r*nr + kao_f/kao_r*nr*(ka_f/ka_r*Complex)^nc);  // modifiers: P5, Complex
  Degradation_GFP: GFP => ; kd*GFP;
  Degradation_LuxI: LuxI => ; kd*LuxI;
  Degradation_Complex: Complex => ; kd*Complex;
  Degradation_LuxR: LuxR => ; kd*LuxR;
  MembraneDiffusion_LuxI: LuxI -> ; kmdiff_f*LuxI - kmdiff_r;

  // Events:
  event0: at (time >= 10000), t0=false, persistent=false, fromTrigger=false: Env = 100;
end

model main()
end
