// SBML level 3 version 1

function f(x)
  2*x;
end

function neighborQuantityLeft(a)
  0;
end

function neighborQuantityRight(a)
  0;
end

function neighborQuantityAbove(a)
  0;
end

function neighborQuantityBelow(a)
  0;
end

function getCompartmentLocationX(a)
  0;
end

function getCompartmentLocationY(a)
  0;
end

model CompModel(Cell, R1, R3, event0, event1, f, S1, S2)

  // Compartments:
  compartment Cell = 1;

  // Species:
  species S1 in Cell = 0;
  species S2 in Cell = 0;

  // Parameters:
  V2 = 0;
  R1_kf = 0.1;
  R3_kf = 0.1;
  x = ;
  kr_f = 0.5; kr_f is "Forward repression binding rate";
  kr_r = 1; kr_r is "Reverse repression binding rate";
  ka_f = 0.0033; ka_f is "Forward activation binding rate";
  ka_r = 1; ka_r is "Reverse activation binding rate";
  kc_f = 0.05; kc_f is "Forward complex formation rate";
  kc_r = 1; kc_r is "Reverse complex formation rate";
  ko_f = 0.033; ko_f is "Forward RNAP binding rate";
  ko_r = 1; ko_r is "Reverse RNAP binding rate";
  kao_f = 1; kao_f is "Forward activated RNAP binding rate";
  kao_r = 1; kao_r is "Reverse activated RNAP binding rate";
  kmdiff_f = 1; kmdiff_f is "Forward membrane diffusion rate";
  kmdiff_r = 0.01; kmdiff_r is "Reverse membrane diffusion rate";
  kd = 0.0075; kd is "Degradation rate";
  kecd = 0.005; kecd is "Extracellular degradation rate";
  nc = 2; nc is "Stoichiometry of binding";
  nr = 30; nr is "Initial RNAP count";
  ko = 0.05; ko is "Open complex production rate";
  kb = 0.0001; kb is "Basal production rate";
  ng = 2; ng is "Initial promoter count";
  np = 10; np is "Stoichiometry of production";
  ka = 0.25; ka is "Activated production rate";
  kecdiff = 1; kecdiff is "Extracellular diffusion rate";
  kf = 2;
  R1_kr = 1;
  R3_kr = 1;
  second = ;

  // Assignment rules:
  V1 := S1 + S2;

  // Rate rules:
  V2' = S1*S2;

  // Reactions:
  R1: S1 => S2; R1_kf*S1;
    R1_kf = 1;
  R3: S2 => S1; R3_kf*S2;
    R3_kf = 1;

  // Events:
  event0: at (10) after (time >= 100), t0=false, persistent=false, fromTrigger=false: S1 = 10;
  event1: at (100) after (true), t0=false, persistent=false, fromTrigger=false: S2 = 100;

  // Constraints:
  constraint V1 != V2;

  // Unit definitions:
  unit perSecond = 1 / second;
end

function neighborQuantityLeft(a)
  0;
end

function neighborQuantityRight(a)
  0;
end

function neighborQuantityAbove(a)
  0;
end

function neighborQuantityBelow(a)
  0;
end

function getCompartmentLocationX(a)
  0;
end

function getCompartmentLocationY(a)
  0;
end

model CompTest(Cell, C1, C1, C1, C1, C1, C1, C1, C1, C1, C1, C1, C1)

  // Sub-modules:
  C1: CompModel(); delete C1.localParameter__R1___kf; delete C1.f; delete C1.unitDefinition__perSecond; delete C1.constraint__constraint0; delete C1.event0; delete C1.event1;

  // Compartments:
  compartment Cell = 1; C1.Cell is Cell;

  // Species:
  substanceOnly species S1 in Cell = 0; C1.S2 is S1;
  substanceOnly species S2 in Cell = 0; C1.S1 is S2;

  // Parameters:
  kr_f = 0.5; kr_f is "Forward repression binding rate";
  kr_r = 1; kr_r is "Reverse repression binding rate";
  ka_f = 0.0033; ka_f is "Forward activation binding rate";
  ka_r = 1; ka_r is "Reverse activation binding rate";
  kc_f = 0.05; kc_f is "Forward complex formation rate";
  kc_r = 1; kc_r is "Reverse complex formation rate";
  ko_f = 0.033; ko_f is "Forward RNAP binding rate";
  ko_r = 1; ko_r is "Reverse RNAP binding rate";
  kao_f = 1; kao_f is "Forward activated RNAP binding rate";
  kao_r = 1; kao_r is "Reverse activated RNAP binding rate";
  kmdiff_f = 1; kmdiff_f is "Forward membrane diffusion rate";
  kmdiff_r = 0.01; kmdiff_r is "Reverse membrane diffusion rate";
  kd = 0.0075; kd is "Degradation rate";
  kecd = 0.005; kecd is "Extracellular degradation rate";
  nc = 2; nc is "Stoichiometry of binding";
  nr = 30; nr is "Initial RNAP count";
  ko = 0.05; ko is "Open complex production rate";
  kb = 0.0001; kb is "Basal production rate";
  ng = 2; ng is "Initial promoter count";
  np = 10; np is "Stoichiometry of production";
  ka = 0.25; ka is "Activated production rate";
  kecdiff = 1; kecdiff is "Extracellular diffusion rate";
  topKf = 3; C1.localParameter__R3___kf is topKf;
end
