// SBML level 3 version 1

model aggregate()
  // model units - time: second, extent: mole

  // Compartments:
  compartment c = 1 litre;
  compartment submod1__c = 1 litre;

  // Species:
  substanceOnly species S in c = 1;  // substance in mole
  substanceOnly species S1 in c = 1;  // substance in mole
  substanceOnly species S2 in c = 1;  // substance in mole
  substanceOnly species S3 in c = 1;  // substance in mole
  substanceOnly species S4 in c = 1;  // substance in mole
  substanceOnly species submod1__S in submod1__c = 1;  // substance in mole
  substanceOnly species submod1__S1 in submod1__c = 1;  // substance in mole
  substanceOnly species submod1__S2 in submod1__c = 1;  // substance in mole
  substanceOnly species submod1__S3 in submod1__c = 1;  // substance in mole
  substanceOnly species submod1__S4 in submod1__c = 1;  // substance in mole

  // Reactions:
  R1: S1 => S2; S1/R1_k;
    R1_k = 0.1 second;
  R2: S2 => S4; S2/R2_k;
    R2_k = 0.1 second;
  submod1__R1: submod1__S1 => submod1__S2; submod1__S1/submod1__R1_k;
    submod1__R1_k = 0.1 second;
  submod1__R2: submod1__S2 => submod1__S4; submod1__S2/submod1__R2_k;
    submod1__R2_k = 0.1 second;
end
