// SBML level 3 version 1

model main()

  // Compartments:
  compartment sub1__comp1 = 1;

  // Species:
  species sub1__S in sub1__comp1 = 1/sub1__comp1;
  species sub1__S1 in sub1__comp1 = 1/sub1__comp1;
  species sub1__S2 in sub1__comp1 = 1/sub1__comp1;
  species sub1__S3 in sub1__comp1 = 1/sub1__comp1;
  species sub1__S4 in sub1__comp1 = 1/sub1__comp1;

  // Parameters:
  sub1__fb_R1_equal = 10;
  sub1__fb_R2_equal = 23;

  // Reactions:
  sub1__R1: sub1__S1 => sub1__S2; sub1__R1_k*sub1__S1;
    sub1__R1_k = 0.1 sub1__vol_per_time;
  sub1__R2: sub1__S2 => sub1__S4; sub1__R2_k*sub1__S2;
    sub1__R2_k = 0.1 sub1__vol_per_time;

  // Unit definitions:
  unit sub1__vol_per_time = litre / second;
end
