// SBML level 2 version 2
// Pass: (1200) Compartment 'a' is undefined.

function fd(x)
  x^3;
end

model main()

  // Compartments:
  compartment a = 1;

  // Species:
  species s in a = 0;

  // Parameters:
  p = 2 litre;
  c = gg(times, x, x1); c has litre;
  c1 has litre;
  x has litre;
  x1 = 3 dimensionless;
  t has second;
  k_s = ;

  // Assignment rules:
  c1 := x*x1;

  // Rate rules:
  p' = x/t;

  // Algebraic rules:
  0 = x^3;

  // Reactions:
  r: s -> ; s*k/t;
    k = 9 litre;

  // Events:
  at (x < 3): s = k_s/x;

  // Constraints:
  constraint x < 3;

  // Unit definitions:
  unit ud1 = mole;
end
