// SBML level 3 version 2

function fd(x)
  x^3;
end

model main()
  // model units - substance: mole, time: second, volume: litre, area: metre, length: metre, extent: mole
  // conversionFactor p

  // Compartments:
  compartment cell = 1e-14 litre;
  compartment comp;  // 4.6-D

  // Species:
  species X0 in comp = 0;  // conversionFactor p
  species P in comp = 0;  // conversionFactor p

  // Parameters:
  Keq = 2.5 dimensionless;
  p = ;

  // Initial assignments:
  p1 = x*p3;

  // Assignment rules:
  p2 := x*p3;

  // Rate rules:
  p3' = p1/p;

  // Algebraic rules:
  0 = x^3;

  // Reactions:
  in: X0 => T; k1*X0*cell;
    k1 = 0.1 per_second;

  // Events:
  e1: at (p + 3) after (true), priority = 1, t0=false, persistent=false: Keq = X0*p;

  // Constraints:
  constraint x < 3;

  // Unit definitions:
  unit nonsense = (5e9 litre)^1.5 * second / (130 mole);
end
