// SBML level 2 version 1
// Author:         Andrew Finney
//   Organisation:   SBMLTeam (http://sbml.org)
//   (C) 2004 - 2005 California Institute of Technology and University of Hertfordshire
//   This is free software;
//   see the file "LICENSE.txt" or the URL http://sbml.org/software/LICENSE.html
//   for licensing and distribution terms.

model algebraicRules_basic()

  // Compartments:
  compartment cell = 1;

  // Species:
  species x in cell = 0.5;
  species y in cell = 0.5;  // substance in mole
  species $z in cell = 1;

  // Rate rules:
  x' = y*z;
  x' = y && z;
  x' = cos(y);
  x' = acos(y);
  x' = y + z;

  // Algebraic rules:
  0 = x + y - z;
end
